<?xml version="1.0"?>
<?xml-stylesheet type="text/xsl" href="http://jsbsim.sourceforge.net/JSBSim.xsl"?>

<fdm_config name="J21" version="2.0" release="ALPHA"
   xmlns:xsi="http://www.w3.org/2001/XMLSchema-instance"
   xsi:noNamespaceSchemaLocation="http://jsbsim.sourceforge.net/JSBSim.xsd">

 <fileheader>
  <author> AeromatiC++ version 3.3.21 </author>
  <filecreationdate> 10 Apr 2024 </filecreationdate>
  <version>$Revision: 1.80 $</version>
  <description> Models a J21. </description>
 </fileheader>

<!--
  File:     J21.xml
  Input parameters:
    Output directory                   : /home/anders
    Create a subdirectory?             : yes
    Overwrite?                         : yes
    Aircraft name                      : J21
    Use dedicates System files?        : yes
    Select a system of measurement     : yes
    Type of aircraft                   : 1
    Stall speed VS1 (clean, no flaps)  : 150.00
    Maximum takeoff weight             : 5200.00
    Empty weight                       : 3250.00
    Inertia Ixx                        : 7965.10
    Inertia Iyy                        : 10991.43
    Inertia Izz                        : 17048.87
    Length                             : 10.22
    Select a wing shape                : 0
    Wing span                          : 11.60
    Wing area                          : 22.20
    Wing aspect ratio                  : 6.10
    Wing taper ratio                   : 0.72
    Wing root chord                    : 1.91
    Wing incidence                     : 2.00
    Wing dihedral                      : 3.00
    Wing sweep (quarter chord)         : 11.00
    Htail area                         : 3.05
    Htail arm                          : 5.20
    Vtail area                         : 2.50
    Vtail arm                          : 5.20
    Propulsion                         : yes
    Engine name                        : DB 605B
    Number of engines                  : 1
    Engine layout                      : 1
    Engine type                        : 0
    Engine power                       : 1085.00
    Maximum engine rpm                 : 2800.00
    Thruster name                      : Propeller
    Propeller diameter                 : 3.00
    Is the propeller fixed pitch?      : no
    Landing Gear                       : yes
    Is landing gear retractable?       : yes
    Nose or tail wheel type            : 0
    Is this a taildragger?             : no
    Flaps                              : yes
    Spoilers                           : no

  Specifications:
    name:          J21
    type:          Single engine WWII Fighter, Military Trainer, Aerobatic, Air Racer
    stall speed:   150.00 km/h
    max weight:    5200.00 kg
    Fuselage:
     length:        10.22 m
     diameter:      0.99 m
     finess ratio:  10.32
    wing:
     span:         11.60 m
     area:         22.20 m2
     mean chord:   1.91 m
     aspect ratio: 6.10:1
     taper ratio:  0.72:1
     incidence:    2.00 degrees
     dihedral:     3.00 degrees
     sweep:        11.00 degrees
     t/c:          6.02 %

    no. engines:   1
    engine type:   Piston Engine
    engine layout: middle fuselage

    gear type:     tricycle
    steering type: steering
    retractable?:  yes

  Outputs:
    wing loading:       2297.43 N/m2
     - thickness ratio: 6.02%
    payload:            1315.60 kg
    CL-alpha:           4.78 per radian
    CL-0:               0.48
    CL-max:             2.16
    CD-0:               0.01
    K:                  0.06
    Mcrit:              0.75

    min. turn radius    97.73 m
    max. turn rate:     0.47 deg/s
-->

 <metrics>
   <wingarea  unit="M2"> 22.20    </wingarea>
   <wingspan  unit="M" > 11.60    </wingspan>
   <wing_incidence unit="DEG"> 2.00 </wing_incidence>
   <chord     unit="M" > 1.91     </chord>
   <htailarea unit="M2"> 3.05     </htailarea>
   <htailarm  unit="M" > 5.20     </htailarm>
   <vtailarea  unit="M2">2.50     </vtailarea>
   <vtailarm  unit="M" > 5.20     </vtailarm>
   <location name="AERORP" unit="M">
     <x> 4.20     </x> <!-- 5.02 -->
     <y> 0.00     </y>
     <z> 0.00     </z>
   </location>
   <location name="EYEPOINT" unit="M">
     <x> 2.86     </x>
     <y> 0.00     </y>
     <z> 1.02     </z>
   </location>
   <location name="VRP" unit="M">
     <x>     4.04 </x> <!-- nose 4.04 m from 3d origin -->
     <y>     0.0 </y>
     <z>     0.0 </z>
   </location>
 </metrics>

 <mass_balance>
   <ixx unit="KG*M2">  8765.10  </ixx> <!-- double beams added 800 -->
   <iyy unit="KG*M2">  10991.43 </iyy>
   <izz unit="KG*M2">  17048.87 </izz>
   <emptywt unit="KG" >  3250.00  </emptywt>
   <location name="CG" unit="M">
     <x> 4.03     </x>
     <y> 0.00     </y>
     <z> -0.26    </z>
   </location>
   <pointmass name="Payload">
    <description> 1379.60 kg should bring model up to entered max weight </description>
    <weight unit="KG"> 657.80 </weight>
    <location name="POINTMASS" unit="M">
     <x> 4.03     </x>
     <y> 0.00     </y>
     <z> -0.26    </z>
   </location>
  </pointmass>
 </mass_balance>

 <propulsion>

   <engine file="DB 605B">
    <feed> 0 </feed>

    <thruster file="Propeller">
     <sense> 1 </sense>
     <location unit="M">
       <x>     6.05 </x>
       <y>     0.00 </y>
       <z>    0.00 </z>
     </location>
     <orient unit="DEG">
       <pitch>     0.00 </pitch>
        <roll>     0.00 </roll>
         <yaw>     0.00 </yaw>
     </orient>
    </thruster>
  </engine>

  <tank type="FUEL" number="0">
     <location unit="M">
       <x>     3.90 </x>
       <y>     0.00 </y>
       <z>     0.00 </z>
     </location>
     <capacity unit="KG"> 382 </capacity>
     <contents unit="KG"> 380 </contents>
  </tank>

 </propulsion>

 <ground_reactions>

  <contact type="BOGEY" name="NOSE">
    <location unit="M">
      <x>     0.32 </x>
      <y>     0.00 </y>
      <z>    -2.02 </z>
    </location>
    <static_friction>  0.80 </static_friction>
    <dynamic_friction> 0.50 </dynamic_friction>
    <rolling_friction> 0.02 </rolling_friction>
    <spring_coeff  unit="N/M">     120000 </spring_coeff>
    <damping_coeff unit="N/M/SEC"> 40000 </damping_coeff>
    <max_steer unit="DEG"> 10.00 </max_steer>
    <brake_group> NONE </brake_group>
    <retractable> 1 </retractable>
  </contact>

  <contact type="BOGEY" name="LEFT_MAIN">
    <location unit="M">
      <x>     4.46 </x>
      <y>    -1.76 </y>
      <z>    -2.26 </z>
    </location>
    <static_friction>  0.80 </static_friction>
    <dynamic_friction> 0.50 </dynamic_friction>
    <rolling_friction> 0.02 </rolling_friction>
    <spring_coeff  unit="N/M">     375000 </spring_coeff>
    <damping_coeff unit="N/M/SEC"> 160000 </damping_coeff>
    <max_steer unit="DEG">0</max_steer>
    <brake_group> LEFT </brake_group>
    <retractable> 1 </retractable>
  </contact>

  <contact type="BOGEY" name="RIGHT_MAIN">
    <location unit="M">
      <x>     4.46 </x>
      <y>     1.76 </y>
      <z>    -2.26 </z>
    </location>
    <static_friction>  0.80 </static_friction>
    <dynamic_friction> 0.50 </dynamic_friction>
    <rolling_friction> 0.02 </rolling_friction>
    <spring_coeff  unit="N/M">     375000 </spring_coeff>
    <damping_coeff unit="N/M/SEC"> 160000 </damping_coeff>
    <max_steer unit="DEG">0</max_steer>
    <brake_group> RIGHT </brake_group>
    <retractable> 1 </retractable>
  </contact>

  <contact type="STRUCTURE" name="LEFT_WING">
    <location unit="M">
     <x>     4.82 </x>
     <y>    -5.65 </y>
     <z>    -0.28 </z>
    </location>
   <static_friction>  1 </static_friction>
   <dynamic_friction> 1 </dynamic_friction>
    <spring_coeff  unit="N/M">     167333.66 </spring_coeff>
    <damping_coeff unit="N/M/SEC"> 83666.83 </damping_coeff>
  </contact>

  <contact type="STRUCTURE" name="RIGHT_WING">
    <location unit="M">
     <x>     4.82 </x>
     <y>     5.65 </y>
     <z>    -0.28 </z>
    </location>
   <static_friction>  1 </static_friction>
   <dynamic_friction> 1 </dynamic_friction>
    <spring_coeff  unit="N/M">     167333.66 </spring_coeff>
    <damping_coeff unit="N/M/SEC"> 83666.83 </damping_coeff>
  </contact>

  <contact type="STRUCTURE" name="RIGHT_TAIL">
    <location unit="M">
     <x>     9.71 </x>
     <y>     -1.71 </y>
     <z>    -0.65 </z>
    </location>
   <static_friction>  1 </static_friction>
   <dynamic_friction> 1 </dynamic_friction>
    <spring_coeff  unit="N/M">     167333.66 </spring_coeff>
    <damping_coeff unit="N/M/SEC"> 83666.83 </damping_coeff>
  </contact>

  <contact type="STRUCTURE" name="LEFT_TAIL">
    <location unit="M">
     <x>     9.71 </x>
     <y>     1.71 </y>
     <z>    -0.65 </z>
    </location>
   <static_friction>  1 </static_friction>
   <dynamic_friction> 1 </dynamic_friction>
    <spring_coeff  unit="N/M">     167333.66 </spring_coeff>
    <damping_coeff unit="N/M/SEC"> 83666.83 </damping_coeff>
  </contact>

  <contact type="STRUCTURE" name="NOSEL">
    <location unit="M">
     <x>     0.0 </x>
     <y>     0.0 </y>
     <z>    -0.20 </z>
    </location>
   <static_friction>  1 </static_friction>
   <dynamic_friction> 1 </dynamic_friction>
    <spring_coeff  unit="N/M">     167333.66 </spring_coeff>
    <damping_coeff unit="N/M/SEC"> 83666.83 </damping_coeff>
  </contact>
 </ground_reactions>

 <system file="Systems/Controls.xml"/>
 <system file="Systems/Gear.xml"/>
 <system file="Systems/Flaps.xml"/>

 <flight_control name="FCS: J21">

 </flight_control>

 <aerodynamics>

  <axis name="LIFT">

    <function name="aero/force/Lift_propwash">
      <description>Delta lift due to propeller induced velocity</description>
      <product>
         <property>propulsion/engine[0]/thrust-coefficient</property>
          <property>aero/qbar-psf</property>
          <property>metrics/Sw-sqft</property>
          <table>
            <independentVar lookup="row">aero/alpha-rad</independentVar>
            <independentVar lookup="column">fcs/flap-pos-deg</independentVar>
            <tableData>
                     0.0     60.0
              -0.32  0.000   0.000
               0.00  0.118   0.316
               0.38  0.536   1.431
               0.75  0.000   0.000
            </tableData>
          </table>
      </product>
    </function>

    <!-- Lift above 0.85 and below -0.85 is generalised -->
    <function name="aero/force/Lift_alpha">
      <description>Lift due to alpha</description>
      <product>
          <property>aero/qbar-psf</property>
          <property>metrics/Sw-sqft</property>
          <table>
            <independentVar lookup="row">aero/alpha-rad</independentVar>
            <tableData>
              -1.57  0.0000
              -1.22 -0.6041
              -1.05 -0.8139
              -0.88 -0.9398
              -0.35 -0.3875
               0.00  0.4768
               0.45  2.1605
               0.55  0.8642
               0.88  1.0602
               1.05  0.9181
               1.22  0.6815
               1.57  0.0000
            </tableData>
          </table>
      </product>
    </function>

    <function name="aero/force/Lift_pitch_rate">
        <description>Lift due to pitch rate</description>
        <product>
          <property>aero/qbar-psf</property>
          <property>metrics/Sw-sqft</property>
          <property>velocities/q-aero-rad_sec</property>
          <property>aero/ci2vel</property>
          <value> 3.0902 </value>
        </product>
      </function>

      <function name="aero/force/Lift_alpha_rate">
        <description>Lift due to alpha rate</description>
        <product>
           <property>aero/qbar-psf</property>
           <property>metrics/Sw-sqft</property>
           <property>aero/alphadot-rad_sec</property>
           <property>aero/ci2vel</property>
           <value> 1.5260 </value>
        </product>
      </function>

    <function name="aero/force/Lift_elevator">
       <description>Lift due to Elevator Deflection</description>
       <product>
           <property>aero/qbar-psf</property>
           <property>metrics/Sw-sqft</property>
           <property>fcs/elevator-pos-rad</property>
           <value> 0.3685 </value>
       </product>
    </function>

    <function name="aero/force/Lift_flap">
       <description>Delta Lift due to flaps</description>
       <product>
           <property>aero/qbar-psf</property>
           <property>metrics/Sw-sqft</property>
           <property>fcs/flap-pos-deg</property>
           <value> 0.0091 </value>
       </product>
    </function>


  </axis>

  <axis name="DRAG">

    <!-- CD0 is based on fuselage, wing, horizontal- en vertical tail -->
    <!-- CD for gear (fixed and retractable) is defined below         -->
    <function name="aero/force/Drag_minimum">
       <description>Minimum drag</description>
       <product>
          <property>aero/qbar-psf</property>
          <property>metrics/Sw-sqft</property>
          <value> 0.0145 </value>
       </product>
    </function>

    <function name="aero/force/Drag_alpha">
       <description>Drag due to alpha</description>
       <product>
          <property>aero/qbar-psf</property>
          <property>metrics/Sw-sqft</property>
          <table>
            <independentVar lookup="row">aero/alpha-rad</independentVar>
            <tableData>
             -1.57    1.4088
             -0.35    0.0859
              0.00    0.0000
              0.35    0.0859
              1.57    1.4088
            </tableData>
          </table>
       </product>
    </function>

    <function name="aero/force/Drag_induced">
       <description>Induced drag</description>
         <product>
           <property>aero/qbar-psf</property>
           <property>metrics/Sw-sqft</property>
           <property>aero/cl-squared</property>
           <value> 0.0535 </value>
         </product>
    </function>

    <function name="aero/force/Drag_mach">
       <description>Drag due to mach</description>
        <product>
          <property>aero/qbar-psf</property>
          <property>metrics/Sw-sqft</property>
          <table>
            <independentVar lookup="row">velocities/mach</independentVar>
            <tableData>
                0.00    0.0000
                0.75    0.0000
                1.10    0.0230
                1.80    0.0150
            </tableData>
          </table>
        </product>
    </function>

    <function name="aero/force/Drag_beta">
       <description>Drag due to sideslip</description>
       <product>
          <property>aero/qbar-psf</property>
          <property>metrics/Sw-sqft</property>
          <table>
            <independentVar lookup="row">aero/beta-rad</independentVar>
            <tableData>
              -1.57    1.2300
              -0.26    0.0500
               0.00    0.0000
               0.26    0.0500
               1.57    1.2300
            </tableData>
          </table>
       </product>
    </function>

    <function name="aero/force/Drag_elevator">
       <description>Drag due to Elevator Deflection</description>
       <product>
           <property>aero/qbar-psf</property>
           <property>metrics/Sw-sqft</property>
           <abs><property>fcs/elevator-pos-rad</property></abs>
           <value> 0.0400 </value>
       </product>
    </function>

    <function name="aero/force/Drag_gear">
       <description>Drag due to gear</description>
         <product>
           <property>aero/qbar-psf</property>
           <property>metrics/Sw-sqft</property>
           <property>gear/gear-pos-norm</property>
           <value> 0.0300 </value>
         </product>
    </function>

    <function name="aero/force/Drag_flap">
       <description>Drag due to flaps</description>
         <product>
           <property>aero/qbar-psf</property>
           <property>metrics/Sw-sqft</property>
           <property>fcs/flap-pos-deg</property>
           <value> 0.0012 </value>
         </product>
    </function>


  </axis>

  <axis name="SIDE">

    <function name="aero/force/Side_beta">
       <description>Side force due to beta</description>
       <product>
           <property>aero/qbar-psf</property>
           <property>metrics/Sw-sqft</property>
           <property>aero/beta-rad</property>
           <value> -0.5306 </value>
       </product>
    </function>
    <function name="aero/force/Side_roll_rate">
       <description>Side force due to roll rate</description>
       <product>
           <property>aero/qbar-psf</property>
           <property>metrics/Sw-sqft</property>
           <property>aero/bi2vel</property>
           <property>velocities/p-aero-rad_sec</property>
           <table>
             <independentVar lookup="row">aero/Re</independentVar>
             <tableData>
                 5455085      0.4045
                 6000593      0.0355
                 8182627      0.0158
                10881324      0.0089
             </tableData>
           </table>
       </product>
    </function>

    <function name="aero/force/Side_yaw_rate">
       <description>Side force due to yaw rate</description>
       <product>
           <property>aero/qbar-psf</property>
           <property>metrics/Sw-sqft</property>
           <property>aero/bi2vel</property>
           <property>velocities/r-aero-rad_sec</property>
           <value> 0.4757 </value>
       </product>
    </function>

    <function name="aero/force/Side_rudder">
       <description>Side force due to rudder</description>
       <product>
           <property>aero/qbar-psf</property>
           <property>metrics/Sw-sqft</property>
           <property>fcs/rudder-pos-rad</property>
           <value> 0.1584 </value>
       </product>
    </function>

  </axis>

  <axis name="PITCH">

    <function name="aero/moment/Pitch_propwash">
      <description>Pitch moment due to propeller induced velocity</description>
      <product>
          <property>propulsion/engine[0]/thrust-coefficient</property>
          <property>aero/qbar-psf</property>
          <property>metrics/Sw-sqft</property>
          <property>metrics/bw-ft</property>
          <table>
            <independentVar lookup="row">aero/alpha-rad</independentVar>
            <independentVar lookup="column">fcs/flap-pos-deg</independentVar>
            <tableData>
                     0.0     60.0
              -0.01  0.000   0.000
               0.00  0.044   0.118
               0.38  0.201   0.535
               0.49  0.000   0.000
            </tableData>
          </table>
      </product>
    </function>

    <function name="aero/moment/Pitch_alpha">
       <description>Pitch moment due to alpha</description>
       <product>
           <property>aero/qbar-psf</property>
           <property>metrics/Sw-sqft</property>
           <property>metrics/cbarw-ft</property>
           <property>aero/alpha-rad</property>
           <value> -0.6444 </value>
       </product>
    </function>

    <function name="aero/moment/Pitch_elevator">
       <description>Pitch moment due to elevator</description>
       <product>
          <property>aero/qbar-psf</property>
          <property>metrics/Sw-sqft</property>
          <property>metrics/cbarw-ft</property>
          <property>fcs/elevator-pos-rad</property>
          <table>
            <independentVar lookup="row">velocities/mach</independentVar>
            <tableData>
              0.0    -0.9815
              2.0    -0.2454
            </tableData>
          </table>
       </product>
    </function>

    <function name="aero/moment/Pitch_damp">
       <description>Pitch moment due to pitch rate</description>
       <product>
           <property>aero/qbar-psf</property>
           <property>metrics/Sw-sqft</property>
           <property>metrics/cbarw-ft</property>
           <property>aero/ci2vel</property>
           <property>velocities/q-aero-rad_sec</property>
           <value> -8.4187 </value>
       </product>
    </function>

    <function name="aero/moment/Pitch_alphadot">
       <description>Pitch moment due to alpha rate</description>
       <product>
           <property>aero/qbar-psf</property>
           <property>metrics/Sw-sqft</property>
           <property>metrics/cbarw-ft</property>
           <property>aero/ci2vel</property>
           <property>aero/alphadot-rad_sec</property>
           <value> -4.1574 </value>
       </product>
    </function>

  </axis>

  <axis name="ROLL">

    <function name="aero/moment/Roll_differential_propwash">
       <description>Roll moment due to differential propwash</description>
       <product>
           <property>propulsion/engine[0]/thrust-coefficient</property>
           <property>aero/qbar-psf</property>
           <property>metrics/Sw-sqft</property>
           <property>metrics/bw-ft</property>
           <property>aero/alpha-rad</property>
           <value> 0.1731 </value>
       </product>
    </function>

    <function name="aero/moment/Roll_beta">
       <description>Roll moment due to beta</description>
       <product>
           <property>aero/qbar-psf</property>
           <property>metrics/Sw-sqft</property>
           <property>metrics/bw-ft</property>
           <property>aero/beta-rad</property>
           <property>fcs/gear-no-wow</property>
           <table>
             <independentVar lookup="row">aero/alpha-rad</independentVar>
             <independentVar lookup="column">aero/Re</independentVar>
             <tableData>
                             5455085     6000593     8182627    10881324
                 -0.0349     -0.5779     -0.1170     -0.0931     -0.0858
                  0.3491     -1.5986     -0.2057     -0.1860     -0.1866
             </tableData>
           </table>
       </product>
    </function>

    <function name="aero/moment/Roll_damp">
       <description>Roll moment due to roll rate</description>
       <product>
           <property>aero/qbar-psf</property>
           <property>metrics/Sw-sqft</property>
           <property>metrics/bw-ft</property>
           <property>aero/bi2vel</property>
           <property>velocities/p-aero-rad_sec</property>
           <value> -0.5454 </value>
       </product>
    </function>

    <function name="aero/moment/Roll_yaw">
       <description>Roll moment due to yaw rate</description>
       <product>
           <property>aero/qbar-psf</property>
           <property>metrics/Sw-sqft</property>
           <property>metrics/bw-ft</property>
           <property>aero/bi2vel</property>
           <property>velocities/r-aero-rad_sec</property>
           <table>
             <independentVar lookup="row">aero/alpha-rad</independentVar>
             <independentVar lookup="column">aero/Re</independentVar>
             <tableData>
                             5455085     6000593     8182627    10881324
                 -0.0349      0.0650      0.0650      0.0650      0.0650
                  0.3491      5.3888      0.5236      0.5236      0.5236
             </tableData>
           </table>
       </product>
    </function>

    <function name="aero/moment/Roll_aileron">
       <description>Roll moment due to aileron</description>
       <product>
          <property>aero/qbar-psf</property>
          <property>metrics/Sw-sqft</property>
          <property>metrics/bw-ft</property>
          <property>fcs/left-aileron-pos-rad</property>
           <table>
            <independentVar lookup="row">velocities/mach</independentVar>
            <tableData>
              0.0    0.1800
              2.0    0.0450
            </tableData>
          </table>
       </product>
    </function>

    <function name="aero/moment/Roll_rudder">
       <description>Roll moment due to rudder</description>
       <product>
           <property>aero/qbar-psf</property>
           <property>metrics/Sw-sqft</property>
           <property>metrics/bw-ft</property>
           <property>fcs/rudder-pos-rad</property>
           <value> 0.0100 </value>
       </product>
    </function>

  </axis>

  <axis name="YAW">

    <!-- Stall initiator -->
    <function name="aero/moment/Yaw_alpha">
       <description>Yaw moment due to alpha</description>
       <product>
           <property>aero/qbar-psf</property>
           <property>metrics/Sw-sqft</property>
           <property>metrics/bw-ft</property>
           <property>aero/alpha-rad</property>
           <property>fcs/gear-no-wow</property>
           <table>
             <independentVar lookup="row">aero/beta-rad</independentVar>
             <independentVar lookup="column">aero/Re</independentVar>
             <tableData>
                             5455085     6000593
                 -0.3491     -1.0000      0.0000
                  0.3491      1.0000      0.0000
             </tableData>
           </table>
       </product>
    </function>

    <function name="aero/moment/Yaw_beta">
       <description>Yaw moment due to beta</description>
       <product>
           <property>aero/qbar-psf</property>
           <property>metrics/Sw-sqft</property>
           <property>metrics/bw-ft</property>
           <property>aero/beta-rad</property>
           <value> 0.1143 </value>
       </product>
    </function>

    <function name="aero/moment/Yaw_roll_rate">
       <description>Yaw moment due to roll rate</description>
       <product>
           <property>aero/qbar-psf</property>
           <property>metrics/Sw-sqft</property>
           <property>metrics/bw-ft</property>
           <property>aero/bi2vel</property>
           <property>velocities/p-rad_sec</property>
           <table>
             <independentVar lookup="row">aero/Re</independentVar>
             <tableData>
                 5455085     -0.1813
                 6000593     -0.0159
                 8182627     -0.0071
                10881324     -0.0040
             </tableData>
           </table>
       </product>
    </function>

    <function name="aero/moment/Yaw_damp">
       <description>Yaw moment due to yaw rate</description>
       <product>
           <property>aero/qbar-psf</property>
           <property>metrics/Sw-sqft</property>
           <property>metrics/bw-ft</property>
           <property>aero/bi2vel</property>
           <property>velocities/r-aero-rad_sec</property>
           <value> -0.1266 </value>
       </product>
    </function>

    <function name="aero/moment/Yaw_rudder">
       <description>Yaw moment due to rudder</description>
       <product>
           <property>aero/qbar-psf</property>
           <property>metrics/Sw-sqft</property>
           <property>metrics/bw-ft</property>
           <property>fcs/rudder-pos-rad</property>
           <value> -0.0710 </value>
       </product>
    </function>

    <function name="aero/moment/Yaw_aileron">
       <description>Adverse yaw</description>
       <product>
           <property>aero/qbar-psf</property>
           <property>metrics/Sw-sqft</property>
           <property>metrics/bw-ft</property>
           <property>fcs/left-aileron-pos-rad</property>
           <value> -0.0030 </value>
       </product>
    </function>

  </axis>

 </aerodynamics>

 <external_reactions>
 </external_reactions>


</fdm_config>
